// COMSOL Multiphysics 6.0.0.318 model "Model2_FET_Fig1.mph"
// Troyan & Doronin (2021) Fig.1a-d ga yaqinlashtirilgan fenomenologik lateral FET modeli.
// Outline of the model tree

Parameters
  W = 250[nm]  // Kanal umumiy uzunligi (source-drain, ixcham nm-masshtab)
  L_gap = 1.5[nm]  // Faol soha uzunligi (Model1 t_int bilan bir xil)
  t_ST = 20[nm]  // Sb2Te3 qalinligi
  t_GT = 20[nm]  // GeTe qalinligi
  t_ox = 10[nm]  // Al2O3 qalinligi
  t_gate = 10[nm]  // Zatvor qalinligi
  x_gap0 = (W-L_gap)/2
  x_gap1 = (W+L_gap)/2
  y_GT = t_ST
  y_ox = t_ST+t_GT
  y_gate = t_ST+t_GT+t_ox
  y_top = t_ST+t_GT+t_ox+t_gate
  sig_ST = 1e5[S/m]  // Sb2Te3 o'tkazuvchanligi
  sig_GT = 1e5[S/m]  // GeTe o'tkazuvchanligi (faqat issiqlik)
  sig_off0 = 1.6182e-8[S/m]  // Faol soha OFF bazaviy o'tkazuvchanligi (KALIBRLANGAN)
  V0_off = 0.8[V]  // Nochiziqli OFF uchun kuchlanish miqyosi (sinh)
  E0_off = V0_off/L_gap  // Nochiziqli OFF uchun maydon miqyosi
  r_off = 0.05[1]  // OFF-gate bog'liqlik nisbati (kalibrlanadi, 2-iteratsiya)
  sig_on0 = 1.0712e-5[S/m]  // ON o'tkazuvchanlik, Ugate=0 (KALIBRLANGAN)
  sig_on_v = 6.0469e-7[S/m]  // ON o'tkazuvchanlik, volatil chegara (KALIBRLANGAN)
  epsr_ST = 50
  epsr_GT = 30
  epsr_int = 10
  epsr_ox = 9
  sig_gate = 5e6[S/m]
  sig_ox = 1e-12[S/m]
  k_ST = 1.0[W/(m*K)]
  k_GT = 2.0[W/(m*K)]
  k_int = 0.5[W/(m*K)]
  k_ox = 30[W/(m*K)]
  k_gate = 20[W/(m*K)]
  rho_ST = 6500[kg/m^3]
  rho_GT = 6140[kg/m^3]
  rho_int = 6300[kg/m^3]
  rho_ox = 3950[kg/m^3]
  rho_gate = 5220[kg/m^3]
  Cp_ST = 200[J/(kg*K)]
  Cp_GT = 250[J/(kg*K)]
  Cp_int = 220[J/(kg*K)]
  Cp_ox = 880[J/(kg*K)]
  Cp_gate = 600[J/(kg*K)]
  Tm_GT = 998[K]
  Tm_ST = 891[K]
  T_amb = 300[K]
  xs = 0  // Faol soha holati (Stationary uchun statik parametr)
  k0 = 1e13[1/s]  // Urinish chastotasi
  Ea_SET = 0.9[eV]  // SET (E_drive>0) uchun aktivatsiya energiyasi
  Ea_RESET = 1.4[eV]  // RESET aktivatsiya energiyasi (z_eff uchun qayta hisoblangan)
  a_SET = 0.3[nm]  // SET uchun sakrash masofasi
  a_RESET = 0.3[nm]  // RESET sakrash masofasi (asosiy, a_SET bilan bir xil)
  z_eff = 2.42[1]  // RESET uchun samarali zaryad ko'paytiruvchisi (ko'p zaryadli ion/klaster farazi)
  tau_nv = 1e3[s]  // Relaksatsiya, nonvolatil chegara
  tau_v = 1.5e-4[s]  // Relaksatsiya, volatil chegara (YAKUNIY - 7-iteratsiya eng yaxshisi)
  p_win = 2  // Oyna darajasi
  kB_c = 1.380649e-23[J/K]
  q_c = 1.602176634e-19[C]
  E_s = 1e7[V/m]  // Biolek yo'nalish silliqlash miqyosi
  Ugate = 0.000[V]  // Zatvor kuchlanishi (Stationary uchun parametr)
  U0 = -1.0[V]  // Sigmoid markazi (moslashtirilgan)
  w_sig = 0.05[V]  // Sigmoid kengligi (torroq)
  tau_P_fall = 1e-3[s]  // P pasayishi (f_gate kamayganda) - TEZ
  tau_P_rise = 75e-3[s]  // P tiklanishi (f_gate ortganda) - SEKIN
  P_s = 0.02[1]  // Silliq yo'nalish funksiyasi uchun P-o'lchov (torroq, 2-iteratsiya)
  V_read = 0.1[V]
  V_app = V_read
  Vamp = 4.000[V]
  f0 = 100[Hz]
  h_gap = 0.3[nm]
  h_glob = 8[nm]
  P_c = 0.17[1]  // tau_rel keskin o'tish chegarasi (P bo'yicha)
  w_P = 0.0015[1]  // tau_rel o'tishining kengligi (JUDA keskin sigmoid)

Variables
  var1 "Variables 1"
    E_drive = -aveop_a(ec.Ex)  // Faol sohadagi haydovchi maydon
    T_local = aveop_a(T)
    g_off = r_off^(1-P)  // OFF o'tkazuvchanlikning zatvor(P)ga bog'liqligi
    sig_off_eff = sig_off0*cosh(E_drive/E0_off)*g_off  // Nochiziqli OFF o'tkazuvchanlik (cosh - Poole-Frenkel/tunnel farazi) * zatvor bosimi g_off(P)
    f_gate = 1/(1+exp(-(Ugate_eff-U0)/w_sig))  // Zatvor muvozanat funksiyasi (sigmoid)
    Ugate_eff = Ugate  // Zatvor kuchlanishi manbai (Stationary: parametr; Time Dependent: Ugate_wave(t) ga almashtiriladi)
    dir_P = 0.5*(1+tanh((f_gate-P)/P_s))  // Silliq yo'nalish: f_gate>P (tiklanish) -> 1, f_gate<P (pasayish) -> 0
    tau_P_eff = dir_P*tau_P_rise+(1-dir_P)*tau_P_fall  // Asimmetrik vaqt doimiysi: tiklanish SEKIN, pasayish TEZ
    dPdt_rhs = (f_gate-P)/tau_P_eff  // dP/dt ifodasi
    sig_on_eff = sig_on_v*(sig_on0/sig_on_v)^P  // P (zatvor XOTIRA holati) ga bog'liq ON o'tkazuvchanlik (log-interpolyatsiya, o'zgarmadi)
    S_tau = 1/(1+exp(-(P-P_c)/w_P))  // tau_rel uchun KESKIN sigmoid (0=volatil/tau_v, 1=xotira/tau_nv)
    tau_rel_eff = tau_v+(tau_nv-tau_v)*S_tau  // P ga bog'liq relaksatsiya vaqti (KESKIN chegara, chiziqli blend)
    sig_fil = sig_off_eff*(sig_on_eff/sig_off_eff)^xode  // Faol soha o'tkazuvchanligi
    dir_smooth = 0.5*(1+tanh(E_drive/E_s))  // SET(1)/RESET(0) yo'nalishi, silliqlashtirilgan
    Ea_eff = dir_smooth*Ea_SET+(1-dir_smooth)*Ea_RESET
    a_eff = dir_smooth*a_SET+(1-dir_smooth)*(z_eff*a_RESET)
    Fwin_x = dir_smooth*(1-xode^(2*p_win))+(1-dir_smooth)*(1-(xode-1)^(2*p_win))
    dxdt_rhs = k0*exp(-Ea_eff/(kB_c*T_local))*sinh(q_c*a_eff*E_drive/(2*kB_c*T_local))*Fwin_x-xode/tau_rel_eff
    smstep1 = 0.5*(1+tanh((t-10[ms])/0.2[ms]))
    smstep2 = 0.5*(1+tanh((t-20[ms])/0.2[ms]))
    smstep3 = 0.5*(1+tanh((t-30[ms])/0.2[ms]))
    Ugate_wave = 0[V]+(-0.9[V]-0[V])*smstep1+(-1.1[V]-(-0.9[V]))*smstep2+(0[V]-(-1.1[V]))*smstep3  // Bosqichli silliq Ugate(t): 0->-0.9->-1.1->0V, har biri 10ms
    V_wave = Vamp*(2/pi)*asin(sin(2*pi*f0*t))

Selections
  sel_ec: Union | entitydim = 2; input = {geom1_r_st_l_dom, geom1_r_st_a_dom, geom1_r_st_r_dom}
  sel_Tbc: Union | entitydim = 1; input = {geom1_box_bot, geom1_box_top}

Couplings
  aveop_a: Average on selection geom1_r_st_a_dom
  maxop_T: Maximum on all domains

Geometry
  geom1 "Geometry 1" (2D, length unit nm)
    r_st_l: Rectangle | size = {x_gap0, t_ST}
    r_st_a: Rectangle | pos = {x_gap0, 0}; size = {L_gap, t_ST}
    r_st_r: Rectangle | pos = {x_gap1, 0}; size = {W-x_gap1, t_ST}
    r_gt: Rectangle | pos = {0, y_GT}; size = {W, t_GT}
    r_ox: Rectangle | pos = {0, y_ox}; size = {W, t_ox}
    r_gate: Rectangle | pos = {0, y_gate}; size = {W, t_gate}
    box_src: BoxSelection | entitydim = 1; xmin = -1; xmax = 0.01[nm]; ymin = -1; ymax = t_ST+0.01[nm]; condition = inside
    box_drn: BoxSelection
      entitydim = 1
      xmin = W-0.01[nm]
      xmax = W+1[nm]
      ymin = -1
      ymax = t_ST+0.01[nm]
      condition = inside
    box_bot: BoxSelection | entitydim = 1; xmin = -1; xmax = W+1[nm]; ymin = -0.01; ymax = 0.01; condition = inside
    box_top: BoxSelection
      entitydim = 1
      xmin = -1
      xmax = W+1[nm]
      ymin = y_top-0.01[nm]
      ymax = y_top+0.01[nm]
      condition = inside
    fin: Finalize "Form Union"

Materials
  mat_st_l: Common "Material" on selection geom1_r_st_l_dom
    def "Basic"
      electricconductivity = sig_ST
      relpermittivity = epsr_ST
      thermalconductivity = k_ST
      density = rho_ST
      heatcapacity = Cp_ST
  mat_st_r: Common "Material 2" on selection geom1_r_st_r_dom
    // same settings as mat_st_l
  mat_fil: Common "Material 3" on selection geom1_r_st_a_dom
    def "Basic"
      electricconductivity = sig_fil
      relpermittivity = epsr_int
      thermalconductivity = k_int
      density = rho_int
      heatcapacity = Cp_int
  mat_gt: Common "Material 4" on selection geom1_r_gt_dom
    def "Basic"
      electricconductivity = sig_GT
      relpermittivity = epsr_GT
      thermalconductivity = k_GT
      density = rho_GT
      heatcapacity = Cp_GT
  mat_ox: Common "Material 5" on selection geom1_r_ox_dom
    def "Basic"
      electricconductivity = sig_ox
      relpermittivity = epsr_ox
      thermalconductivity = k_ox
      density = rho_ox
      heatcapacity = Cp_ox
  mat_gate: Common "Material 6" on selection geom1_r_gate_dom
    def "Basic"
      electricconductivity = sig_gate
      relpermittivity = 1
      thermalconductivity = k_gate
      density = rho_gate
      heatcapacity = Cp_gate

Physics
  ec: ConductiveMedia "Electric Currents" on selection sel_ec
    dependent variable V
    cucn1: CurrentConservation (default)
    ein1: ElectricInsulation (default)
    init1: init "Initial Values 1" (default)
    term1: Terminal on selection geom1_box_drn | TerminalType = Voltage; V0 = V_wave
    gnd1: Ground on selection geom1_box_src
  ht: HeatTransfer "Heat Transfer in Solids" on all domains
    dependent variable T
    solid1: SolidHeatTransferModel "Solid 1" (default)
    init1: init "Initial Values 1" (default)
    ins1: ThermalInsulation (default)
    temp1: TemperatureBoundary "Temperature 1" on selection sel_Tbc | T0 = T_amb
  ge: GlobalEquations "Global ODEs and DAEs"
    ge1: GlobalEquations
      name = {xode, P}
      equation = {xodet-dxdt_rhs, Pt-dPdt_rhs}
      initialValueU = {1.49744967e-14, 1.35253014e-01}
      initialValueUt = {0, 0}
      valueType = complex
      DependentVariableQuantity = dimensionless
      CustomDependentVariableUnit = m
      SourceTermQuantity = dimensionless
      CustomSourceTermUnit = m

Multiphysics
  emh1: ElectromagneticHeating on all domains | EMHeat_physics = ec; Heat_physics = ht

Mesh
  mesh1 "Mesh 1"
    size: MeshSizeDefault | hmax = h_glob; hmin = 0.1[nm]; hgrad = 1.2; custom = on
    size_gap: Size on selection geom1_r_st_a_dom | hmax = h_gap; custom = on
    ftri1: FreeTri "Free Triangular 1" on remaining entities

Studies
  std1 "Study 1"
    stat: Stationary | solve for = {ec}
  std4 "Study 4"
    time: Transient "Time Dependent" | tlist = range(0,1e-4,0.01); solve for = {ec, ge}

Solver configurations
  sol1 "Solution 1" (study std1)
    v1: Variables "Dependent Variables 1"
    s1: Stationary "Stationary Solver 1"
      dDef: Direct
      fc1: FullyCoupled
  sol2 "Solution 2" (study std4)
    v1: Variables "Dependent Variables 1"
    t1: Time "Time-Dependent Solver 1"
      dDef: Direct
      fc1: FullyCoupled

Datasets
  dset1: Solution | solution = sol1
  dset2: Solution | solution = sol2

Derived values
  gev_R: EvalGlobal "Global Evaluation" | data = dset1; expr = ec.I0_1
  gev_S4: EvalGlobal "Global Evaluation 4" | data = dset2; expr = {t, V_wave, ec.I0_1, xode, P, maxop_T(T)}

Plots
  pg_VI: PlotGroup1D "S4 (panel d): V(t) va I(t)*1000" | data = dset2
    g1: Global | expr = {V_wave, ec.I0_1*1000}
  pg_xP: PlotGroup1D "S4 (panel d): xode(t) va P(t)" | data = dset2
    g1: Global | expr = {xode, P}