// COMSOL Multiphysics 6.0.0.318 model "Model3_Pressure.mph"
// Model1 geometriyasi + Solid Mechanics: bosim ostida R_ON(p), R_OFF(p) (fenomenologik tunnel-o'tkazuvchanlik farazi).
// Outline of the model tree

Parameters
  R_dev = 1[um]  // Element radiusi (Model1 2-bosqich bilan bir xil)
  t_be = 10[nm]  // Pastki elektrod qalinligi
  t_ST = 20[nm]  // Sb2Te3 qalinligi
  t_int = 1.5[nm]  // Interfeys qalinligi (bosimsiz)
  t_GT = 20[nm]  // GeTe qalinligi
  t_te = 10[nm]  // Yuqori elektrod qalinligi
  r_f = 200[nm]  // Filament radiusi
  z_ST = t_be
  z_int = t_be+t_ST
  z_GT = z_int+t_int
  z_te = z_GT+t_GT
  z_top = z_te+t_te
  sig_m = 5e6[S/m]  // Elektrod o'tkazuvchanligi
  sig_ST = 1e5[S/m]  // Sb2Te3 o'tkazuvchanligi
  sig_GT = 1e5[S/m]  // GeTe o'tkazuvchanligi
  sig_off = 4.775e-3[S/m]  // Interfeys OFF o'tkazuvchanligi (Model1 S1 dan kalibrlangan)
  sig_on0 = 1.594[S/m]  // Filament ON o'tkazuvchanligi, p=0 (Model1 S1 dan)
  epsr_m = 1
  epsr_ST = 50
  epsr_GT = 30
  epsr_int = 10
  V_read = 0.1[V]  // O'qish kuchlanishi
  xs = 0  // Filament holati (0=OFF, 1=ON)
  R_ON_t = 7[kohm]
  R_OFF_t = 100[kohm]
  E_m = 250[GPa]  // TiN elastik moduli - TEKSHIRILSIN
  E_ST = 55[GPa]  // Sb2Te3 elastik moduli - TEKSHIRILSIN
  E_GT = 50[GPa]  // GeTe elastik moduli - TEKSHIRILSIN
  E_int = 10[GPa]  // Interfeys (vdW, c-o'q) elastik moduli - TEKSHIRILSIN, juda noaniq
  nu_m = 0.25  // TiN Puasson nisbati - TEKSHIRILSIN
  nu_ST = 0.25  // Sb2Te3 Puasson nisbati - TEKSHIRILSIN
  nu_GT = 0.25  // GeTe Puasson nisbati - TEKSHIRILSIN
  nu_int = 0.25  // Interfeys Puasson nisbati - TEKSHIRILSIN
  rho_m = 5220[kg/m^3]
  rho_ST = 6500[kg/m^3]
  rho_GT = 6140[kg/m^3]
  rho_int = 6300[kg/m^3]
  p_load = 0[GPa]  // Yuqoridan qo'yiladigan bosim
  beta_mem = 0  // Tunnel-fitting parametri (xotira holati, beta>0) - kalibrlangan
  h_int = 0.5[nm]  // Interfeys/filamentda maksimal element
  h_glob = 2[nm]  // Qolgan joyda maksimal element

Variables
  var1 "Variables 1"
    d_gap = t_int*(1+aveop_int(solid.eZZ))  // Interfeys samarali qalinligi bosim ostida
    sig_on_p = sig_on0*exp(beta_mem*(t_int-d_gap)/t_int)  // Bosimga bog'liq ON o'tkazuvchanlik (tunnel farazi)
    sig_fil = sig_off*(sig_on_p/sig_off)^xs  // Filament o'tkazuvchanligi

Selections
  sel_int: Union "Interfeys qatlami" | entitydim = 2; input = {geom1_r_fil_dom, geom1_r_ring_dom}
  sel_el: Union "Elektrodlar" | entitydim = 2; input = {geom1_r_be_dom, geom1_r_te_dom}

Couplings
  aveop_int: Average on selection sel_int | axisym = on

Geometry
  geom1 "Geometry 1" (2D axisymmetric, length unit nm)
    r_be: Rectangle | size = {R_dev, t_be}
    r_st: Rectangle | pos = {0, z_ST}; size = {R_dev, t_ST}
    r_fil: Rectangle | pos = {0, z_int}; size = {r_f, t_int}
    r_ring: Rectangle | pos = {r_f, z_int}; size = {R_dev-r_f, t_int}
    r_gt: Rectangle | pos = {0, z_GT}; size = {R_dev, t_GT}
    r_te: Rectangle | pos = {0, z_te}; size = {R_dev, t_te}
    box_top: BoxSelection
      entitydim = 1
      xmin = -1
      xmax = R_dev+1[nm]
      ymin = z_top-0.01[nm]
      ymax = z_top+0.01[nm]
      condition = inside
    box_bot: BoxSelection | entitydim = 1; xmin = -1; xmax = R_dev+1[nm]; ymin = -0.01; ymax = 0.01; condition = inside
    box_out: BoxSelection
      entitydim = 1
      xmin = R_dev-0.01[nm]
      xmax = R_dev+0.01[nm]
      ymin = -1
      ymax = z_top+1[nm]
      condition = inside
    fin: Finalize "Form Union"

Materials
  mat_el: Common "Elektrodlar" on selection sel_el
    def "Basic"
      electricconductivity = sig_m
      relpermittivity = epsr_m
      youngsmodulus = E_m
      poissonsratio = nu_m
      density = rho_m
  mat_ST: Common "Sb2Te3" on selection geom1_r_st_dom
    def "Basic"
      electricconductivity = sig_ST
      relpermittivity = epsr_ST
      youngsmodulus = E_ST
      poissonsratio = nu_ST
      density = rho_ST
  mat_GT: Common "GeTe" on selection geom1_r_gt_dom
    def "Basic"
      electricconductivity = sig_GT
      relpermittivity = epsr_GT
      youngsmodulus = E_GT
      poissonsratio = nu_GT
      density = rho_GT
  mat_ring: Common "Interfeys halqasi" on selection geom1_r_ring_dom
    def "Basic"
      electricconductivity = sig_off
      relpermittivity = epsr_int
      youngsmodulus = E_int
      poissonsratio = nu_int
      density = rho_int
  mat_fil: Common "Filament" on selection geom1_r_fil_dom
    def "Basic"
      electricconductivity = sig_fil
      relpermittivity = epsr_int
      youngsmodulus = E_int
      poissonsratio = nu_int
      density = rho_int

Physics
  solid: SolidMechanics on all domains
    dependent variable u = {u, v, w}
    lemm1: LinearElasticModel "Linear Elastic Material 1" (default)
    axi1: AxialSymmetrySolid "Axial Symmetry 1" (default)
    free1: Free (default)
    init1: init "Initial Values 1" (default)
    fix1: Fixed "Pastki chegara (mahkamlangan)" on selection geom1_box_bot
    roll1: Roller "Yon devor (roller)" on selection geom1_box_out
    load1: BoundaryLoad "Yuqori bosim" on selection geom1_box_top | LoadType = FollowerPressure; FollowerPressure = p_load
  ec: ConductiveMedia "Electric Currents" on all domains
    dependent variable V
    cucn1: CurrentConservation (default)
    axi1: AxialSymmetry (default)
    ein1: ElectricInsulation (default)
    init1: init "Initial Values 1" (default)
    term1: Terminal on selection geom1_box_top | TerminalType = Voltage; V0 = V_read
    gnd1: Ground on selection geom1_box_bot

Mesh
  mesh1 "Mesh 1"
    size: MeshSizeDefault | hmax = h_glob; hmin = 0.02[nm]; hgrad = 1.2; custom = on
    map1: Map "Mapped 1" on selection sel_int
    ftri1: FreeTri "Free Triangular 1" on remaining entities

Studies
  std1 "N7: Solid Mechanics -> Electric Currents (ketma-ket)"
    stat1: Stationary "1-qadam: Solid Mechanics" | solve for = {solid}
    stat2: Stationary "2-qadam: Electric Currents" | solve for = {ec}

Solver configurations
  sol1 "Solution 1" (study std1)
    v1: Variables "Dependent Variables 1"
    s1: Stationary "Stationary Solver 1"
      dDef: Direct
      fc1: FullyCoupled
    su1: StoreSolution "Solution Store 1"
    v2: Variables "Dependent Variables 2"
    s2: Stationary "Stationary Solver 2"
      dDef: Direct
      fc1: FullyCoupled
  sol2 "Solution Store 1" (study std1)

Datasets
  dset1: Solution | solution = sol1
  dset2: Solution | solution = sol2

Derived values
  gev_R: EvalGlobal "Global Evaluation" | data = dset1; expr = V_read/ec.I0_1
  gev_dgap: EvalGlobal "Global Evaluation 2" | data = dset1; expr = d_gap

Plots
  pg_stress: PlotGroup2D "N7: Von Mises kuchlanish (oxirgi holat)" | data = dset1
    surf1: Surface | expr = solid.mises
  pg_dgap: PlotGroup1D "N7: d_gap qiymati (oxirgi holat)" | data = dset1
    g1: Global | expr = d_gap